<?xml version="1.0"?>

<rocket_engine name="ROCK">
  <isp>              2000 </isp>
  <maxthrottle>      1.00 </maxthrottle>
  <minthrottle>         0 </minthrottle>
  <slfuelflowmax>      25 </slfuelflowmax>
  <sloxiflowmax>       25 </sloxiflowmax>
</rocket_engine>
